<?xml version="1.0"?>

<!--
  File:     cesaroni_l1720_engine.xml
  Description: Cesaroni L1720 solid rocket motor - Real Performance Data

  Specifications (from manufacturer data):
  - Total impulse: 540 Ns (121 lbf⋅s)
  - Burn time: 1.14seconds
  - Peak thrust: 555.2 N (124.8 lbf)
  - Profile: Neutral curve (slight peak, sslight dip, flat cost, decline)
  - Propellant mass: 247.2 g (0.545 lbs, using 0.545 lbs in sim)
  - ISP: ~223 seconds
  - Real thrust curve data from manufacturer graph
-->

<rocket_engine name="cesaroni_I470_engine">
    <isp>223.0</isp>
    <builduptime>0.1</builduptime>
    <variation>
        <thrust>0.00</thrust>
        <total_isp>0.00</total_isp>
    </variation>
    <thrust_table name="propulsion/thrust_prop_remain" type="internal">
      <tableData>
            0.000     116.2790831   <!-- 0.000s: 517.2 N -->
            0.005249  126.7441669   <!-- 0.005s: 563.8 N (Peak Thrust) -->
            0.013123  120.9303813   <!-- 0.013s: 537.9 N -->
            0.036745  113.953434    <!-- 0.037s: 506.9 N -->
            0.039370  116.6666538   <!-- 0.039s: 519.0 N -->
            0.068242  116.6666538   <!-- 0.068s: 519.0 N -->
            0.094488  117.0542245   <!-- 0.094s: 520.7 N -->
            0.131234  117.8295908   <!-- 0.131s: 524.1 N -->
            0.178478  118.2171615   <!-- 0.178s: 525.9 N -->
            0.217848  118.2171615   <!-- 0.218s: 525.9 N -->
            0.267717  118.6047322   <!-- 0.268s: 527.6 N -->
            0.299213  117.4417953   <!-- 0.299s: 522.4 N -->
            0.346457  117.0542245   <!-- 0.346s: 520.7 N -->
            0.388451  117.4417953   <!-- 0.388s: 522.4 N -->
            0.422572  118.2171615   <!-- 0.423s: 525.9 N -->
            0.459318  117.4417953   <!-- 0.459s: 522.4 N -->
            0.509186  116.2790831   <!-- 0.509s: 517.2 N -->
            0.553806  115.8915124   <!-- 0.554s: 515.5 N -->
            0.585302  115.8915124   <!-- 0.585s: 515.5 N -->
            0.637795  114.3412295   <!-- 0.638s: 508.6 N -->
            0.687664  113.5658633   <!-- 0.688s: 505.2 N -->
            0.729659  114.3412295   <!-- 0.730s: 508.6 N -->
            0.771654  113.1782926   <!-- 0.772s: 503.4 N -->
            0.824147  111.6280097   <!-- 0.824s: 496.5 N -->
            0.860892  111.240439    <!-- 0.861s: 494.8 N -->
            0.900262  110.4650728   <!-- 0.900s: 491.4 N -->
            0.926509  108.5272192   <!-- 0.927s: 482.8 N -->
            0.973753   93.41083721  <!-- 0.974s: 415.5 N -->
            0.997375   84.1084656   <!-- 0.997s: 374.1 N -->
            1.00525    75.96903094  <!-- 1.005s: 337.9 N -->
            1.02362    63.5658688   <!-- 1.024s: 282.8 N -->
            1.04987    51.93807289  <!-- 1.050s: 231.0 N -->
            1.06562    40.69762289  <!-- 1.066s: 181.0 N -->
            1.07612    30.23253913  <!-- 1.076s: 134.5 N -->
            1.08661    19.37986217  <!-- 1.087s: 86.2 N -->
            1.09974     7.364338184 <!-- 1.100s: 32.8 N -->
            1.11024     0           <!-- 1.110s: 0 N -->
            1.14000     0           <!-- 1.140s: 0 N -->
            1.50000     0           <!-- 1.150s: 0 N (Extended safety) -->
      </tableData>
    </thrust_table>
</rocket_engine>
