<?xml version="1.0"?>
<?xml-stylesheet type="text/xsl" href="http://jsbsim.sourceforge.net/JSBSim.xsl"?>

<fdm_config name="rocket" version="2.0" release="ALPHA"
   xmlns:xsi="http://www.w3.org/2001/XMLSchema-instance"
   xsi:noNamespaceSchemaLocation="http://jsbsim.sourceforge.net/JSBSim.xsd">

 <fileheader>
  <author> AeromatiC++ version 3.3.21 </author>
  <filecreationdate> 16 May 2025 </filecreationdate>
  <version>$Revision: 1.80 $</version>
  <description> Models a rocket. </description>
 </fileheader>

<!--
  File:     rocket.xml
  Input parameters:
    Output directory                   : C:\Users\bob\Downloads\
    Create a subdirectory?             : yes
    Overwrite?                         : yes
    Aircraft name                      : rocket
    Use dedicated system files?        : yes
    Select a system of measurement     : no
    Type of aircraft                   : 0
    Stall speed VS1 (clean, no flaps)  : 795.46
    Maximum takeoff weight             : 47.00
    Empty weight                       : 43.00
    Inertia Ixx                        : 0.01
    Inertia Iyy                        : 3.50
    Inertia Izz                        : 1.33
    Length                             : 9.08
    Select a wing shape                : 2
    Wing span                          : 0.50
    Wing area                          : 0.25
    Wing aspect ratio                  : 5.50
    Wing taper ratio                   : 4.00
    Wing root chord                    : 0.09
    Wing incidence                     : 0.00
    Wing dihedral                      : 0.00
    Wing sweep (quarter chord)         : 0.00
    Htail area                         : 0.04
    Htail arm                          : 4.68
    Vtail area                         : 0.03
    Vtail arm                          : 4.50
    Propulsion                         : yes
    Engine name                        : my_engine
    Number of engines                  : 1
    Engine layout                      : 2
    Engine type                        : 3
    Engine thrust                      : 444.00
    Nozzle name                        : my_nozzle
    Nozzle diameter                    : 0.25
    Landing Gear                       : no
    Flaps                              : no
    Spoilers                           : no
    Chute                              : yes

  Specifications:
    name:          rocket
    type:          Single engine Glider, Small Commuter
    stall speed:   795.46 kt
    max weight:    47.00 lbs
    Fuselage:
     length:        9.08 ft
     diameter:      4.50 ft
     finess ratio:  2.00
    wing:
     span:         0.50 ft
     area:         0.25 ft2
     mean chord:   0.09 ft
     aspect ratio: 5.50:1
     taper ratio:  4.00:1
     incidence:    0.00 degrees
     dihedral:     0.00 degrees
     sweep:        0.00 degrees
     t/c:          0.01 %

    no. engines:   1
    engine type:   Rocket Engine
    engine layout: aft fuselage

  Outputs:
    wing loading:       188.00 lbs/sq-ft
     - thickness ratio: 0.01%
    payload:            -2.96 lbs
    CL-alpha:           403.03 per radian
    CL-0:               0.01
    CL-max:             0.09
    CD-0:               0.00
    K:                  0.04
    Mcrit:              0.70

    min. turn radius    30928.67 ft
    max. turn rate:     0.05 deg/s
-->

 <metrics>
   <wingarea  unit="FT2"> 0.0873     </wingarea>  <!-- Pi * (0.167)^2 for 4" diameter rocket body -->
   <wingspan  unit="FT" > 0.0      </wingspan>   <!-- No wings on rocket -->
   <wing_incidence unit="DEG"> 0.00 </wing_incidence>
   <chord     unit="FT" > 0.0      </chord>      <!-- No wing chord -->
   <htailarea unit="FT2"> 0.432      </htailarea>  <!-- Total fin area: 2 fins x 0.216 ft² each -->
   <htailarm  unit="FT" > 1.849     </htailarm>   <!-- Fin arm: 59" - 36.808" = 22.192" = 1.849 ft -->
   <vtailarea  unit="FT2"> 0.432     </vtailarea>  <!-- Total fin area: 2 fins × 0.216 ft² each -->
   <vtailarm  unit="FT" > 1.849     </vtailarm>    <!-- Fin arm: 59" - 36.808" = 22.192" = 1.849 ft -->

   <!-- use this syntax for custom parameters-->
   <property value="0.333">metrics/acsarea</property> <!-- ACS fin area: 4 x 12in^2 = 0.333 ft^2-->
   <property value="0.834">metrics/acsarm</property> <!--ACS arm: 48.61 - 36.808" = 10.002" =  0.834 ft -->

   <location name="AERORP" unit="FT">  <!-- Center of Pressure at 46.926" from OpenRocket -->
     <x> 3.9105   </x>
     <y> 0.00     </y>
     <z> 0.00     </z>
   </location>
   <location name="EYEPOINT" unit="FT">
     <x> 1.17     </x>
     <y> -1.50    </y>
     <z> 3.75     </z>
   </location>
   <location name="VRP" unit="FT">
     <x>     0.0 </x>
     <y>     0.0 </y>
     <z>     0.0 </z>
   </location>
 </metrics>


 <mass_balance>
   <ixx unit="SLUG*FT2">  0.0109  </ixx>  <!-- Roll inertia for 4" diameter rocket -->
   <iyy unit="SLUG*FT2">  1.148    </iyy>   <!-- Pitch/Yaw inertia for 68" rocket -->
   <izz unit="SLUG*FT2">  1.148     </izz>   <!-- Pitch/Yaw inertia for 68" rocket -->
   <emptywt unit="LBS" >  12.855 </emptywt>  <!-- No motor mass of rocket from openrocket -->
   <location name="CG" unit="IN">  <!-- Center of Gravity at 36.808" (wet), 34.659" (no motor) -->
     <x> 34.659     </x>
     <y> 0.00     </y>
     <z> 0.00     </z>
   </location>
   <pointmass name="Motor">
    <description> Cesaroni I470 motor propellant mass </description>
    <weight unit="LBS"> 0.545 </weight>  <!-- Given mass from manufacturer  -->
    <location name="POINTMASS" unit="FT">  <!-- Motor location at rear -->
     <x> 5.167     </x>  <!-- Around 62" from nose (center of motor)-->
     <y> 0.00     </y>
     <z> 0.00    </z>
   </location>
  </pointmass>
 </mass_balance>

 <propulsion>
    <engine file="cesaroni_I470_engine">
        <feed>0</feed>
        <running>0</running>
        <starter>0</starter>
        <thruster file="I470_nozzle">
            <location unit="FT">  <!-- Motor at rear of rocket -->
                <x>5.667</x>  <!-- 68" from nose -->
                <y>0.0</y>
                <z>0.0</z>
            </location>
            <orient>
                <pitch unit="DEG">0.0</pitch>  <!-- Aligned with body X-axis for forward thrust -->
                <yaw unit="DEG">0.0</yaw>
            </orient>
        </thruster>
    </engine>
    <tank type="FUEL">
        <fuel_type>FUEL</fuel_type>
        <location unit="FT">  <!-- Motor fuel location -->
            <x>5.167 </x>  <!-- Motor center -->
            <y>0.0</y>
            <z>0.0</z>
        </location>
        <capacity unit="LBS">0.545</capacity>  <!-- I470 propellant mass -->
        <contents unit="LBS">0.545</contents>
    </tank>
 </propulsion>

 <system file="Conventional Controls.xml"/>
 <system file="Landing Gear.xml"/>

 <flight_control name="FCS: My Aircraft">
   <channel name="Landing Gear">
    <switch name="fcs/gear-no-wow">
      <default value="1"/>
    </switch>
  </channel>
 </flight_control>

 <aerodynamics>


  <property value="0">aero/ACSangle</property>

   <!-- Dynamic CPx location based on ACS angle -->
   <function name="aero/CPx">
      <description>Center of Pressure location vs ACS angle</description>
      <table>
         <independentVar lookup="row">aero/ACSangle</independentVar>
         <tableData> <!-- Center of Pressure at 46.926" from OpenRocket -->
            0        3.9105        <!-- ACS stowed -->
            0.7854   3.9105        <!-- ACS deployed (45 deg) -->
            1.5708   3.9105        <!-- 90 deg -->
         </tableData>
      </table>
   </function>


  <axis name="LIFT">

    <!-- Lift above 0.85 and below -0.85 is generalised -->
    <function name="aero/force/Lift_alpha">
      <description>Lift due to alpha</description>
      <product>
          <property>aero/qbar-psf</property>
          <property>metrics/Sw-sqft</property>
          <table>
            <independentVar lookup="row">aero/alpha-rad</independentVar>
            <tableData>
              -1.57  0.0000
              -1.22  0.0000  <!-- No lift for rocket body -->
              -1.05  0.0000
              -0.88  0.0000
               0.00  0.0000  <!-- Zero lift at zero alpha -->
               0.88  0.0000
               1.05  0.0000
               1.22  0.0000
               1.57  0.0000
            </tableData>
          </table>
      </product>
    </function>

    <function name="aero/force/Lift_pitch_rate">
        <description>Lift due to pitch rate</description>
        <product>
          <property>aero/qbar-psf</property>
          <property>metrics/Sw-sqft</property>
          <property>velocities/q-aero-rad_sec</property>
          <property>aero/ci2vel</property>
          <value> 0.0 </value>  <!-- No lift due to pitch rate for rocket -->
        </product>
    </function>

      <function name="aero/force/Lift_alpha_rate">
        <description>Lift due to alpha rate</description>
        <product>
           <property>aero/qbar-psf</property>
           <property>metrics/Sw-sqft</property>
           <property>aero/alphadot-rad_sec</property>
           <property>aero/ci2vel</property>
           <value> 0.0 </value>  <!-- No lift due to alpha rate for rocket -->
        </product>
      </function>

    <function name="aero/force/Lift_elevator">
       <description>Lift due to Elevator Deflection</description>
       <product>
           <property>aero/qbar-psf</property>
           <property>metrics/Sw-sqft</property>
           <property>fcs/elevator-pos-rad</property>
           <value> 0.0 </value>  <!-- No elevators on rocket -->
       </product>
    </function>
  </axis>

  <axis name="DRAG">


    <!-- CD0 is based on fuselage, wing, horizontal- en vertical tail -->
    <!-- CD for gear (fixed and retractable) is defined below         -->
    <function name="aero/force/Drag_minimum">
       <description>Minimum drag - rocket body drag coefficient</description>
       <product>
          <property>aero/qbar-psf</property>
          <property>metrics/Sw-sqft</property>
          <table>
            <independentVar lookup="row">aero/ACSangle</independentVar>
            <tableData>
            0        0.38         <!-- ACS stowed -->
            0.7854   3.0          <!-- ACS deployed (45 deg) -->
            1.5708   5.0          <!-- 90 deg -->
            </tableData>
          </table>
       </product>
    </function>

    <function name="aero/force/Drag_alpha">
       <description>Drag due to alpha</description>
       <product>
          <property>aero/qbar-psf</property>
          <property>metrics/Sw-sqft</property>
          <table>
            <independentVar lookup="row">aero/alpha-rad</independentVar>
            <tableData>
             -1.57    0.1500  <!-- Much lower drag at high angles for streamlined rocket -->
              0.00    0.0000
              1.57    0.1500  <!-- Much lower drag at high angles for streamlined rocket -->
            </tableData>
          </table>
       </product>
    </function>

    <function name="aero/force/Drag_induced">
       <description>Induced drag</description>
         <product>
           <property>aero/qbar-psf</property>
           <property>metrics/Sw-sqft</property>
           <property>aero/cl-squared</property>
           <value> 0.0001 </value>  <!-- Essentially zero induced drag for rocket -->
         </product>
    </function>

    <function name="aero/force/Drag_mach">
       <description>Drag due to mach</description>
        <product>
          <property>aero/qbar-psf</property>
          <property>metrics/Sw-sqft</property>
          <table>
            <independentVar lookup="row">velocities/mach</independentVar>
            <tableData>
                0.00    0.0000
                0.70    0.0000
                1.10    0.005   <!-- Lower transonic drag for streamlined rocket -->
                1.80    0.002   <!-- Lower supersonic drag for streamlined rocket -->
            </tableData>
          </table>
        </product>
    </function>

    <function name="aero/force/Drag_beta">
       <description>Drag due to sideslip</description>
       <product>
          <property>aero/qbar-psf</property>
          <property>metrics/Sw-sqft</property>
          <table>
            <independentVar lookup="row">aero/beta-rad</independentVar>
            <tableData>
              -1.57    0.0500  <!-- Much lower sideslip drag for streamlined rocket -->
              -0.26    0.0050
               0.00    0.0000
               0.26    0.0050
               1.57    0.0500  <!-- Much lower sideslip drag for streamlined rocket -->
            </tableData>
          </table>
       </product>
    </function>

    <function name="aero/force/Drag_elevator">
       <description>Drag due to Elevator Deflection</description>
       <product>
           <property>aero/qbar-psf</property>
           <property>metrics/Sw-sqft</property>
           <abs><property>fcs/elevator-pos-rad</property></abs>
           <value> 0.001 </value>  <!-- Very minimal fin deflection drag for rocket -->
       </product>
    </function>

    <function name="aero/force/Drag_fins">
       <description>Drag due to fins</description>
       <product>
           <property>aero/qbar-psf</property>
           <property>metrics/Sw-sqft</property>
           <value> 0.02 </value>  <!-- Small fin drag coefficient (0.0873 ft² fins / 0.0873 ft² reference = 1 ratio × 0.02 CD) -->
       </product>
    </function>

  </axis>

  <axis name="SIDE">

    <function name="aero/force/Side_beta">
       <description>Side force due to beta</description>
       <product>
           <property>aero/qbar-psf</property>
           <property>metrics/Sw-sqft</property>
           <property>aero/beta-rad</property>
           <value> 0.0 </value>  <!-- No side force for rocket body -->
       </product>
    </function>
    <function name="aero/force/Side_roll_rate">
       <description>Side force due to roll rate</description>
       <product>
           <property>aero/qbar-psf</property>
           <property>metrics/Sw-sqft</property>
           <property>aero/bi2vel</property>
           <property>velocities/p-aero-rad_sec</property>
           <value> 0.0 </value>  <!-- No side force due to roll rate for rocket -->
       </product>
    </function>

    <function name="aero/force/Side_yaw_rate">
       <description>Side force due to yaw rate</description>
       <product>
           <property>aero/qbar-psf</property>
           <property>metrics/Sw-sqft</property>
           <property>aero/bi2vel</property>
           <property>velocities/r-aero-rad_sec</property>
           <value> 0.0 </value>  <!-- No side force due to yaw rate for rocket -->
       </product>
    </function>

    <function name="aero/force/Side_rudder">
       <description>Side force due to rudder</description>
       <product>
           <property>aero/qbar-psf</property>
           <property>metrics/Sw-sqft</property>
           <property>fcs/rudder-pos-rad</property>
           <value> 0.0 </value>  <!-- No rudder on rocket -->
       </product>
    </function>

  </axis>

  <axis name="PITCH">

    <function name="aero/moment/Pitch_alpha">
       <description>Pitch moment due to alpha - fin stability at tail location</description>
       <product>
           <property>aero/qbar-psf</property>
           <value>0.432</value>  <!-- Fin area in ft² -->
           <value>1.849 </value>  <!-- Fin arm in ft (distance from CG to fins) [46.61-37.155 = 9.455 in = 0.788 ft] -->
           <property>aero/alpha-rad</property>
           <value> -1.0 </value>  <!-- Fins provide restoring pitch moment -->
       </product>
    </function>

    <function name="aero/moment/Pitch_elevator">
       <description>Pitch moment due to elevator</description>
       <product>
          <property>aero/qbar-psf</property>
          <property>metrics/Sw-sqft</property>
          <property>metrics/cbarw-ft</property>
          <property>fcs/elevator-pos-rad</property>
          <value> 0.0 </value>  <!-- No elevator on rocket -->
       </product>
    </function>

    <function name="aero/moment/Pitch_damp">
       <description>Pitch moment due to pitch rate - fin damping at tail location</description>
       <product>
           <property>aero/qbar-psf</property>
           <value>0.432</value>  <!-- Fin area in ft² -->
           <value>1.849</value>  <!-- Fin arm in ft -->
           <property>aero/ci2vel</property>
           <property>velocities/q-aero-rad_sec</property>
           <value> -0.5 </value>  <!-- Fin pitch damping -->
       </product>
    </function>

    <function name="aero/moment/Pitch_alphadot">
       <description>Pitch moment due to alpha rate</description>
       <product>
           <property>aero/qbar-psf</property>
           <property>metrics/Sw-sqft</property>
           <property>metrics/cbarw-ft</property>
           <property>aero/ci2vel</property>
           <property>aero/alphadot-rad_sec</property>
           <value> 0.0 </value>  <!-- No pitch moment due to alpha rate for rocket -->
       </product>
    </function>

    <function name="aero/moment/Pitch_ACS">
      <description>Pitch restoring moment from ACS fins</description>
      <product>
         <property>aero/qbar-psf</property>
         <property>metrics/acsarea</property>  <!-- ACS fin area in ft² -->
         <property>metrics/acsarm</property> <!-- Distance from CG in ft -->
         <property>aero/alpha-rad</property>
         <value>-1.0</value>       <!-- Restoring moment coefficient -->
      </product>
    </function>

    <function name="aero/moment/Pitch_ACS_damp">
      <description>Pitch damping from ACS fins</description>
      <product>
         <property>aero/qbar-psf</property>
         <property>metrics/acsarea</property>  <!-- ACS fin area in ft² -->
         <property>metrics/acsarm</property> <!-- Distance from CG in ft -->
         <property>aero/ci2vel</property>
         <property>velocities/q-aero-rad_sec</property>
         <value>-0.2</value>
      </product>
    </function>

  </axis>

  <axis name="ROLL">

    <function name="aero/moment/Roll_beta">
       <description>Roll moment due to beta</description>
       <product>
           <property>aero/qbar-psf</property>
           <property>metrics/Sw-sqft</property>
           <property>metrics/bw-ft</property>
           <property>aero/beta-rad</property>
           <property>fcs/gear-no-wow</property>
           <value> 0.0 </value>  <!-- No roll moment for rocket body -->
       </product>
    </function>

    <function name="aero/moment/Roll_damp">
       <description>Roll moment due to roll rate - fin damping around rocket centerline</description>
       <product>
           <property>aero/qbar-psf</property>
           <value>0.432</value>  <!-- Total fin area in ft² -->
           <value>1.849</value>  <!-- Fin span from centerline (2" rocket radius) -->
           <property>aero/bi2vel</property>
           <property>velocities/p-aero-rad_sec</property>
           <value> -0.2 </value>  <!-- Fin roll damping -->
       </product>
    </function>

    <function name="aero/moment/Roll_yaw">
       <description>Roll moment due to yaw rate</description>
       <product>
           <property>aero/qbar-psf</property>
           <property>metrics/Sw-sqft</property>
           <property>metrics/bw-ft</property>
           <property>aero/bi2vel</property>
           <property>velocities/r-aero-rad_sec</property>
           <value> 0.0 </value>  <!-- No roll moment due to yaw rate for rocket -->
       </product>
    </function>

    <function name="aero/moment/Roll_aileron">
       <description>Roll moment due to aileron</description>
       <product>
          <property>aero/qbar-psf</property>
          <property>metrics/Sw-sqft</property>
          <property>metrics/bw-ft</property>
          <property>fcs/left-aileron-pos-rad</property>
          <value> 0.0 </value>  <!-- No ailerons on rocket -->
       </product>
    </function>

    <function name="aero/moment/Roll_rudder">
       <description>Roll moment due to rudder</description>
       <product>
           <property>aero/qbar-psf</property>
           <property>metrics/Sw-sqft</property>
           <property>metrics/bw-ft</property>
           <property>fcs/rudder-pos-rad</property>
           <value> 0.0 </value>  <!-- No rudder on rocket -->
       </product>
    </function>

    <function name="aero/moment/Roll_ACS">
      <description>Roll damping from ACS fins</description>
      <product>
         <property>aero/qbar-psf</property>
         <property>metrics/acsarea</property>  <!-- ACS fin area in ft² -->
         <value>0.167</value>                  <!-- Rocket radius to fin tip -->
         <property>aero/bi2vel</property>
         <property>velocities/p-aero-rad_sec</property>
         <value>-0.2</value>
      </product>
    </function>

  </axis>

  <axis name="YAW">

    <function name="aero/moment/Yaw_alpha">
       <description>Yaw moment due to alpha</description>
       <product>
           <property>aero/qbar-psf</property>
           <property>metrics/Sw-sqft</property>
           <property>metrics/bw-ft</property>
           <property>aero/alpha-rad</property>
           <property>fcs/gear-no-wow</property>
           <value> 0.0 </value>  <!-- No yaw moment due to alpha for rocket -->
       </product>
    </function>

    <function name="aero/moment/Yaw_beta">
       <description>Yaw moment due to beta - fin stability at tail location</description>
       <product>
           <property>aero/qbar-psf</property>
           <value>0.432</value>  <!-- Fin area in ft² -->
           <value>1.849</value>  <!-- Fin arm in ft (distance from CG to fins) -->
           <property>aero/beta-rad</property>
           <value> -1.0 </value>  <!-- Fins provide restoring yaw moment -->
       </product>
    </function>

    <function name="aero/moment/Yaw_roll_rate">
       <description>Yaw moment due to roll rate</description>
       <product>
           <property>aero/qbar-psf</property>
           <property>metrics/Sw-sqft</property>
           <property>metrics/bw-ft</property>
           <property>aero/bi2vel</property>
           <property>velocities/p-rad_sec</property>
           <value> 0.0 </value>  <!-- No yaw moment due to roll rate for rocket -->
       </product>
    </function>

    <function name="aero/moment/Yaw_damp">
       <description>Yaw moment due to yaw rate - fin damping at tail location</description>
       <product>
           <property>aero/qbar-psf</property>
           <value>0.432</value>  <!-- Fin area in ft² -->
           <value>1.849</value>  <!-- Fin arm in ft -->
           <property>aero/bi2vel</property>
           <property>velocities/r-aero-rad_sec</property>
           <value> -0.5 </value>  <!-- Fin yaw damping -->
       </product>
    </function>

    <function name="aero/moment/Yaw_rudder">
       <description>Yaw moment due to rudder</description>
       <product>
           <property>aero/qbar-psf</property>
           <property>metrics/Sw-sqft</property>
           <property>metrics/bw-ft</property>
           <property>fcs/rudder-pos-rad</property>
           <value> 0.0 </value>  <!-- No rudder on rocket -->
       </product>
    </function>

    <function name="aero/moment/Yaw_aileron">
       <description>Adverse yaw</description>
       <product>
           <property>aero/qbar-psf</property>
           <property>metrics/Sw-sqft</property>
           <property>metrics/bw-ft</property>
           <property>fcs/left-aileron-pos-rad</property>
           <value> 0.0 </value>  <!-- No ailerons on rocket -->
       </product>
    </function>

    <function name="aero/moment/Yaw_ACS">
      <description>Yaw restoring moment from ACS fins</description>
      <product>
         <property>aero/qbar-psf</property>
         <property>metrics/acsarea</property>  <!-- ACS fin area in ft² -->
         <property>metrics/acsarm</property> <!-- Distance from CG in ft -->
         <property>aero/beta-rad</property>
         <value>-1.0</value>
      </product>
    </function>

  </axis>

 </aerodynamics>

 <external_reactions>

  <property value="12.566">external_reactions/main_chute/drag_area</property>
  <property value="0">external_reactions/main_chute/main_open</property>

  <force name="main_chute" frame="WIND">
   <function>
    <product>
     <property>aero/qbar-psf</property>
     <property>external_reactions/main_chute/drag_area</property>
     <table>
         <independentVar lookup="row">external_reactions/main_chute/main_open</independentVar>
         <tableData>
         0  0
         1  2.2
         </tableData>
      </table>
    </product>
   </function>
   <location unit="FT">  <!-- Nose of rocket for main chute -->
    <x> 1.96 </x> <!-- parachute is 23.5 in from nose-->
    <y> 0 </y>
    <z> 0 </z>
   </location>
   <direction>
    <x>-1 </x>  <!-- Opposes forward motion -->
    <y> 0 </y>
    <z> 0 </z>
   </direction>
  </force>

 </external_reactions>

 <ground_reactions>
    <contact type="BOGEY" name="LANDING_CONTACT">
        <location unit="FT">  <!-- Contact point at rocket nozzle (bottom end) -->
            <x>5.676</x>  <!-- At nozzle end (68.11" from nose) -->
            <y>0.0</y>
            <z>0.167</z>   <!-- At bottom surface of rocket (2" radius = 0.167 ft down from centerline) -->
        </location>
        <static_friction>0.8</static_friction>
        <dynamic_friction>0.7</dynamic_friction>
        <rolling_friction>0.01</rolling_friction>
        <spring_coeff unit="LBS/FT">0.01</spring_coeff>  <!-- Very weak spring to minimize false triggers -->
        <damping_coeff unit="LBS/FT/SEC">0.01</damping_coeff>  <!-- Very weak damping -->
        <max_steer unit="DEG">0.0</max_steer>
        <brake_group>NONE</brake_group>
    </contact>
</ground_reactions>

</fdm_config>
