<?xml version="1.0"?>

<!-- AeroTech I600R-6, approximated from spreadsheet summary values.
     Spreadsheet: total impulse 640 Ns, average thrust 572 N,
     peak thrust 818 N, burn time 1.12 s. Launch mass 617 g, empty mass 293 g, propellant mass 324 g.
     JSBSim rocket thrust table values follow the existing repo convention:
     thrust in lbf versus total propellant expended in lbm. -->
<rocket_engine name="aerotech_i600r_engine">
    <isp>201.5</isp>
    <builduptime>0.0</builduptime>
    <thrust_table name="propulsion/thrust_prop_remain" type="internal">
      <tableData>
        0.0000 193.53
        0.0135 193.53
        0.0575 186.90
        0.1585 176.26
        0.2786 169.16
        0.3933 160.87
        0.4788 146.68
        0.5694 132.49
        0.6492 113.56
        0.6798 106.46
        0.6960 67.42
        0.7064 44.95
        0.7131 13.01
        0.7140 0.00
      </tableData>
    </thrust_table>
</rocket_engine>
